<?xml version="1.0" encoding="utf-8"?>
<Node name="root" dt="0.005" gravity="0 0 -9.81">
    <Node name="plugins">
        <RequiredPlugin pluginName="SOFA.VTK"/>
    </Node>

    <UnstructuredGridVTKLoader name="VtkLoader" filename="mesh/seaMonster2-volume1.vtu" flipNormals="0" printLog="true" createSubelements="true"/>
    <OglModel name="VisualModel" src="@VtkLoader" color="red"/>
</Node>
